// COMSOL Multiphysics 6.1.0.282 model "Nerve_1_Fascicle_1_CUFF.mph"
// Outline of the model tree

Parameters
  Outer_D = 5[mm]  // Outer box diameter
  Nerve_D = 250[um]  // Nerve Diameter
  Fascicle_D = 200[um]  // Fascicle Diameter, in um
  Nerve_y_c = 0[um]  // Nerve yz-plane center of gravity, in um
  Nerve_z_c = 0[um]  // Nerve yz-plane center of gravity, in um
  Fascicle_y_c = 0[um]  // Fascicle zy-plane center of gravity, in um
  Fascicle_z_c = 0[um]  // Fascicle yz-plane center of gravity, in um
  Length = 5000[um]  // Nerve, Fascicle and axons length, in um
  CUFF_1_insulator_length = 3*CUFF_1_contact_length  // LIFE electrode diameter, in um
  CUFF_1_insulator_thickness = 0.4*(Outer_D - Nerve_D)/2  // LIFE electrode length, in um
  CUFF_1_contact_thickness = 0.1*(Outer_D - Nerve_D)/2  // LIFE electrode yz-plane center of gravity, in um
  CUFF_1_contact_length = 50[um]  // LIFE electrode yz-plane center of gravity, in um
  CUFF_1_x_center = 2500[um]  // LIFE electrode shift from x = 0, in um
  Outer_conductivity = 0.1[S/m]  // Conductivity of the outer material, in S/m, isotropic
  Epineurium_conductivity = 0.085[S/m]  // Conductivity of the Epineurium, in S/m, isotrpic
  Endoneurium_conductivity_xx = 0.571[S/m]  // Conductivity of the Endoneurium along the x axis, in S/m
  Endoneurium_conductivity_yy = 0.085[S/m]  // Conductivity of the Endoneurium along the y axis, in S/m
  Endoneurium_conductivity_zz = 0.085[S/m]  // Conductivity of the Endoneurium along the y axis, in S/m
  Perineurium_thickness = 5[um]  // Thickness of the Periuneurium sheat
  Perineurium_conductivity = 0.002[S/m]  // Conductivity of the Perineurium, in S/m, isotropic
  CUFF_1_Istim = 1[mA]

Selections
  sel1: Explicit on no points

Geometry
  geom1 "Geometry 1" (3D, length unit m)
    cyl1: Cylinder "Outer_box" | pos = {0, Nerve_y_c, Nerve_z_c}; axistype = x; r = Outer_D/2; h = Length
    cyl2: Cylinder "Nerve" | pos = {0, Nerve_y_c, Nerve_z_c}; axistype = x; r = Nerve_D/2; h = Length
    cyl3: Cylinder "Fascicle" | axistype = x; r = Fascicle_D/2; h = Length
    cyl4: Cylinder "CUFF_insulator"
      geomattr = {construction, on}
      geomattrlevel = 16
      pos = {CUFF_1_x_center - (CUFF_1_insulator_length/2), Nerve_y_c, Nerve_z_c}
      axistype = x
      r = Nerve_D/2+CUFF_1_insulator_thickness
      h = CUFF_1_insulator_length
    dif2: Difference "CUFF" | input = cyl1; input2 = cyl4; keep = true
    cyl5: Cylinder "CUFF_contact"
      pos = {CUFF_1_x_center - (CUFF_1_contact_length/2), Nerve_y_c, Nerve_z_c}
      axistype = x
      r = Nerve_D/2+CUFF_1_contact_thickness
      h = CUFF_1_contact_length
    dif1: Difference | input = cyl2, cyl3; input2 = cyl5; keepadd = on; keep = true
    fin: Finalize "Form Union"

Materials
  mat1: Common "Outer" on domains 1
    def "Basic"
      relpermittivity = 1
      electricconductivity = Outer_conductivity
  mat2: Common "Endoneurium" on domains 3, 5, 7, 9, 11
    def "Basic"
      relpermittivity = 1
      electricconductivity = diag{Endoneurium_conductivity_xx, Endoneurium_conductivity_yy, Endoneurium_conductivity_zz}
  mat3: Common "Epineurium" on domains 2, 4, 6, 8, 10
    def "Basic"
      relpermittivity = 1
      electricconductivity = Epineurium_conductivity

Physics
  ec: ConductiveMedia "Electric Currents" on all domains
    dependent variable V
    cucn1: CurrentConservation (default)
    ein1: ElectricInsulation (default)
    init1: init "Initial Values 1" (default)
    ci1: ContactImpedance on boundaries 8, 9, 12, 13, 23, 24, 27, 28, 35, 36, 38, 39, 45, 46, 48, 49, 56, 57, 59, 60
      ds = Perineurium_thickness
      sigmabnd_mat = userdef
      sigmabnd = Perineurium_conductivity
      epsilonrbnd_mat = userdef
      epsilonrbnd = 1
    bcs1: BoundaryCurrentSource (disabled) on no boundaries
      Qjs = CUFF_1_Istim/(pi*(Nerve_D+2*CUFF_1_contact_thickness)*CUFF_1_contact_length)
      coordinateSystem = GlobalSystem
    gnd1: Ground on boundaries 2, 3, 10, 15
    ncd1: NormalCurrentDensity on boundaries 32, 33, 37, 40
      nJ = CUFF_1_Istim/(pi*(Nerve_D+2*CUFF_1_contact_thickness)*CUFF_1_contact_length)

Mesh
  mesh2 "Mesh"
    size: MeshSizeDefault "default_size" | hauto = 3
    ftet1: FreeTet "Nerve_mesh" on domains 1, 2, 4, 6, 8, 10
      size1: Size on domains 1, 2, 4, 6, 8, 10 | hauto = 3
    ftet2: FreeTet "Outer_mesh" on domains 3, 5, 7, 9, 11
      size1: Size on domains 3, 5, 7, 9, 11 | hauto = 6

Studies
  std1 "Study 1"
    param: Parametric "Parametric Sweep" | pname = CUFF_1_Istim; plistarr = {1}; punit = mA
    stat: Stationary | loadcase = Load case 1

Solver configurations
  sol1 "Solution 1" (study std1)
    v1: Variables "Dependent Variables 1"
    s1: Stationary "Stationary Solver 1"
      p1: Parametric | pname = CUFF_1_Istim; plistarr = {1}; punit = mA; pcontinuationmode = no
      fc1: FullyCoupled | linsolver = i1
      i1: Iterative | linsolver = cg
        mg1: Multigrid | prefun = amg; coarseningmethod = classic

Datasets
  dset1: Solution | solution = sol1

Plots
  pg1: PlotGroup3D "Electric Potential (ec)" | data = dset1
  pg2: PlotGroup3D "Potentiel électrique (ec)" | data = dset1
    vol1: Volume | expr = V
  pg3: PlotGroup3D "Norme du champ électrique (ec)" | data = dset1
    mslc1: Multislice "Multicoupes 1" | expr = ec.normE
    strmsl1: StreamlineMultislice "Lignes de courant multicoupes 1" | expr = {ec.Ex, ec.Ey, ec.Ez}
      col1: Color "Expression de la couleur 1" | expr = ec.normE
      filt1: Filter "Filtre 1" | expr = !isScalingSystemDomain

Exports
  img1: Image "Nerve_potential" | sourceobject = pg1; size = current; unit = px; width = 800; height = 600